*Heading
** Job name: Job-1 Model name: Model-1
** Generated by: Abaqus/CAE 2022
*Preprint, echo=NO, model=NO, history=NO, contact=NO
**
** PARTS
**
*Part, name=Part-1
*Node
      1,          35.,          30.,           0.
      2,   16.5663338,          2.5,           0.
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*Element, type=C3D10
   1,   521,  1213,   479,  1214,  2469,  2468,  2467,  2471,  2470,  2472
   2,   650,  1215,   659,  1216,  2475,  2474,  2473,  2477,  2476,  2478
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*Nset, nset=Set-1
     1,     2,     3,     4,     5,     6
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*Elset, elset=Set-1, generate
    1,  5737,     1
*Nset, nset=Set-2
     2,     3,     5,     6,     8,     9
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*Elset, elset=Set-2, generate
  5738,  11511,      1
** Section: Section-1
*Solid Section, elset=Set-1, material=Material-1
,
** Section: Section-2
*Solid Section, elset=Set-2, material=Material-2
,
*End Part
**
**
** ASSEMBLY
**
*Assembly, name=Assembly
**
*Instance, name=Part-1-1, part=Part-1
*End Instance
**
*End Assembly
**
** MATERIALS
**
*Material, name=Material-1
*Elastic
 2e+06, 0.3
*Material, name=Material-2
*Elastic
70000., 0.34
